#-------------------INITIALIZATION-------------------------

units 				real
atom_style 			full
dimension 			3
boundary 			p p p

#---------------------VARIABLES----------------------------

variable	       		Temperature equal  300
variable	       		Pressure equal  1
variable    			cod1 equal 9.0
variable 			tempdamp equal 100
variable 			pressdamp equal 1000
variable			cod equal 9.0
variable 	MassinGrams equal mass(all)/6.02e23
variable 	VolumeCubicCentimeter equal vol*1.0e-24
variable 	Density equal v_MassinGrams/v_VolumeCubicCentimeter
variable	SpecificVolume equal 1.0/v_Density

#--------------------FORCE FIELD---------------------------

bond_style 			harmonic
angle_style 			harmonic
dihedral_style 			fourier
improper_style 			cvff
special_bonds 			lj 0.0 0.0 0.5 coul 0.0 0.0 0.8333333333
pair_style 			lj/cut/coul/long ${cod1} ${cod1}
pair_modify 			mix arithmetic tail yes
kspace_style 			pppm 1e-4

#---------------GENERAL SIMULATION SETTINGS------------------

read_data 			data_final-init.data

neighbor        		2.0 bin
neigh_modify    		delay 0 every 1 check yes page 1000000 one 20000

thermo_style 			custom step density etotal pe ke enthalpy lx ly lz cpu temp press ebond eangle edihed eimp epair evdwl ecoul elong etail
thermo         			1000
thermo_modify			flush yes

fix 				shk all shake 0.0001 20 0 m 1.007947
timestep			2.0

velocity 			all create ${Temperature} 4928459 dist gaussian

#------------ENSEMBLE SETUP: NPT EQUILIBRATION--------------

# NPT EQUILIBRATION (DENSITY)

fix 				dens_data all ave/time 1 1 1 v_Density file density_final-data.txt
fix           			NPT all npt temp ${Temperature} ${Temperature} ${tempdamp} iso ${Pressure} ${Pressure} ${pressdamp}
run 				2000000
unfix dens_data
unfix NPT
print "NPT equilibration is finished."
write_data 			data_density_1ns.data
write_restart			restart-npt.*


## NVT EQUILIBRATION

#fix 				NVT all nvt temp 300 300 ${tempdamp}
#run 				200000
#unfix NVT
#print "NVT equilibration is finished."
#write_data 			data_nvt-equilib_1ns.data
#write_restart			restart-nvt.*


## NVE PRODUCTION

#compute				positions all position #diffusivity

#group				mol1 molecule 1
#group				molelse molecule > 1

#compute 			T all temp
#compute 			P all pressure T #viscosity

#compute 			KE all ke/atom
#compute 			PE all pe/atom
#compute 			ST all stress/atom NULL virial
#compute 			heatflux all heat/flux KE PE ST #thermal conductivity

#compute 			OCTP_rdf all rdf/ext file RDF.dat
#fix 				f_rdf all ave/time 1 5000 5000 c_OCTP_rdf

#fix				OCTP_d all ordern diffusivity 1 5000 c_positions
#fix 				OCTP_v all ordern viscosity 1 5000 c_P start 1000000
#fix 				OCTP_t all ordern thermalconductivity 1 5000 c_heatflux start 1000000


#dump 				traj all custom 5000 dump.lammpstrj id mol type mass xu yu zu
#dump_modify 			traj sort id

#fix 				NVE all nve
#run 				5000000
#print "NVE production run is finished."
#write_data 			data_nve-production_10ns.data
#write_restart			restart-nve.*
